// COMSOL Multiphysics 6.1.0.252 model "heat_sink_surface_radiation.zh_CN1.mph"
// 含表面对表面辐射的散热器
// 本例与“散热器”模型相似，但还引入了表面对表面辐射。由于散热器表面的辐射率较高，因此表面对表面辐射不可忽略。分析表明，当表面辐射率接近 1 时，辐射传热可以显著降低系统的最高温度。
// Outline of the model tree

Parameters
  L_channel = 7[cm]  // 通道长度
  W_channel = 3[cm]  // 通道宽度
  H_channel = 1.5[cm]  // 通道高度
  L_chip = 1.5[cm]  // 芯片大小
  H_chip = 2[mm]  // 芯片高度
  U0 = 5[cm/s]  // 平均入口速度
  P0 = 1[W]  // 电子封装产生的总功率损耗

Common definitions
  ampr1: AmbientProperties "环境属性 1"

Geometry
  geom1 "几何 1" (3D, length unit mm)
    wp1: WorkPlane "工作平面 1" | quickplane = xz; quicky = -7.5; unite = on
      pol1: Polygon "多边形 1"
        x = {-10.495, -9.495, -9.495, -9.495, -9.495, -10.495, -10.495, -10.495}
        y = {0, 0, 0, 2, 2, 1, 1, 0}
    rev1: Revolve "回转 1" | workplane = wp1; input = wp1; angle2 = 90; axistype = 3d; pos3 = {-7.5, -7.5, 0}
    ext1: Extrude "拉伸 1" | extrudefrom = faces; workplane = wp1; inputface = rev1(1) boundaries 1; distance = 15
    rot1: Rotate "旋转 1" | input = ext1; keep = on; rot = range(90, 90,270)
    wp2: WorkPlane "工作平面 2" | planetype = faceparallel; face = ext1(1) boundaries 4; unite = on
      cro1: CrossSection "横截面 1"
      ccur1: ConvertToCurve "转换为曲线 1" | input = selection cro1
      csol1: ConvertToSolid "转换为实体 1" | input = selection ccur1
      boxsel1: BoxSelection "框选择 1" | entitydim = 2
      boxsel2: BoxSelection "框选择 2" | entitydim = 2; xmin = -10; xmax = -10; ymin = 0; ymax = 0
      difsel1: DifferenceSelection "差集选择 1" | entitydim = 2; add = {boxsel1}; subtract = {boxsel2}
      del1: Delete "删除实体 1" | input = selection difsel1
    ext2: Extrude "拉伸 2" | workplane = wp2; input = wp2; distance = 2; reverse = on
    wp3: WorkPlane "工作平面 3" | quickz = 2
      pol1: Polygon "多边形 1"
        x = {-8.597, -8.048, -8.048, -6.952, -6.952, -6.4, -6.4, -6.952, -6.952, -8.048}
        y = {-7.5, -8.45, -8.45, -8.45, -8.45, -7.5, -7.5, -6.55, -6.55, -6.55}
      copy1: Copy "复制 1" | input = pol1; keep = on; displx = 3.748; disply = 3.748
    ext3: Extrude "拉伸 3" | workplane = wp3; input = wp3; distance = 8
    arr1: Array "阵列 1" | input = ext3(1); size = {3, 3, 1}; fullsize = {3, 3, 1}; displ = {7.495, 7.495, 0}
    arr2: Array "阵列 2" | input = ext3(2); size = {2, 2, 1}; fullsize = {2, 2, 1}; displ = {7.495, 7.495, 0}
    uni1: Union "并集 1"
      input = ext1, rot1(1), rot1(2), rot1(3), ext2, arr1(1,1,1), arr1(2,1,1), arr1(3,1,1), arr1(1,2,1), arr1(2,2,1), arr1(3,2,1), arr1(1,3,1), arr1(2,3,1), arr1(3,3,1), arr2(1,1,1), arr2(2,1,1), arr2(1,2,1), arr2(2,2,1)
      face = all
    blk1: Block "长方体 1" | pos = {0, 0, -H_chip/2}; base = center; size = {L_chip, L_chip, H_chip}
    blk2: Block "长方体 2" | pos = {-45, -W_channel/2, 0}; size = {L_channel, W_channel, H_channel}
    del1: Delete "删除实体 1" | input = blk2(1) domains 1
    fin: Finalize "形成联合体"

Materials
  mat2: Common "Aluminum 3003-H18" on domains 1
    def "Basic"
      relpermeability = 1
      electricconductivity = 2.326e7[S/m]
      thermalexpansioncoefficient = 23.2e-6[1/K]
      heatcapacity = 893[J/(kg*K)]
      relpermittivity = 1
      density = 2730[kg/m^3]
      thermalconductivity = 155[W/(m*K)]
    Enu "Young's modulus and Poisson's ratio"
      E = 69[GPa]
      nu = 0.33
  mat3: Common "Silica glass" on domains 2
    def "Basic"
      relpermeability = 1
      electricconductivity = 1e-14[S/m]
      thermalexpansioncoefficient = 0.55e-6[1/K]
      heatcapacity = 703[J/(kg*K)]
      relpermittivity = 3.75
      density = 2203[kg/m^3]
      thermalconductivity = 1.38[W/(m*K)]
    Enu "Young's modulus and Poisson's ratio"
      E = 73.1[GPa]
      nu = 0.17
    RefractiveIndex
      n = 1.45
      ki = 0

Physics
  solid: SolidMechanics "固体力学" on all domains
    dependent variable u = {u, v, w}
    lemm1: LinearElasticModel "线弹性材料 1" (default) | IsotropicOption = CpCs
    free1: Free "自由 1" (default)
    init1: init "初始值 1" (default)
    lrb1: LowReflectingBoundary "低反射边界 1" on boundaries 1, 2, 5-7, 9-11, 27, 29-31, 34-37, 108, 110-114, 121-123
  ht: HeatTransfer "固体传热" on all domains
    dependent variable T
    solid1: SolidHeatTransferModel "固体 1" (default)
    init1: init "初始值 1" (default)
    ins1: ThermalInsulation "热绝缘 1" (default)
    hs1: HeatSource "热源 1" on domains 2 | Q0 = 1e8
    hf1: HeatFluxBoundary "热通量 1" on all boundaries | HeatFluxType = ConvectiveHeatFlux; h = 100

Multiphysics
  te1: ThermalExpansion "热膨胀 1" on all domains | Heat_physics = ht; Solid_physics = solid

Mesh
  mesh1 "网格 1" (physics-controlled)
    size: MeshSizeDefault "大小" | hauto = 3

Studies
  std1 "研究 1"
    time: Transient "瞬态" | tlist = range(0,0.1,120)

Solver configurations
  sol1 "解 1" (study std1)
    v1: Variables "因变量 1"
      comp1_u: Field "位移场 (comp1.u)" | scalemethod = manual; scaleval = 1e-2*0.0320181229931
    t1: Time "瞬态求解器 1"
      tlist = range(0,0.1,120)
      rtol = 0.001
      atolmethod = {comp1_T, global, comp1_u, global}
      atolvaluemethod = {comp1_T, factor, comp1_u, factor}
      atol = {comp1_T, 1e-3, comp1_u, 1e-3}
      timemethod = genalpha
      maxorder = 2
      estrat = exclude
      maxstepconstraintgenalpha = const
      se1: Segregated "分离 1" | segstabacc = segaacc; segaaccdim = 5; segaaccmix = 0.9
        ss1: SegregatedStep "温度" | segvar = {comp1_T}; linsolver = d1; subjtech = once
        ss2: SegregatedStep "固体力学" | segvar = {comp1_u}; linsolver = d2
        ll1: LowerLimit "下限 1" | lowerlimit = comp1.T 0
      d1: Direct "直接，传热变量 ht (te1)" | linsolver = pardiso; pivotperturb = 1.0E-13
      d2: Direct "建议的直接求解器 solid (te1)" | linsolver = pardiso; pivotperturb = 1.0E-9

Datasets
  dset1: Solution | solution = sol1
  cpt1: CutPoint3D "三维截点 1" | data = dset1; pointx = 0; pointy = 0; pointz = -0.5
  cpl1: CutPlane "截面 1"
    data = dset1
    quickplane = xy
    genpoints = {{0, 0, 0}, {-10, 10, 10}, {10, -10, 10}}
    spacevars = {cpl1x, cpl1y}

Plots
  pg4: PlotGroup3D "位移 (solid)" | data = dset1
    vol1: Volume "体 1" | data = dset1; expr = w
  pg5: PlotGroup1D "一维绘图组 5" | data = dset1
    ptgr1: PointGraph "点结果图 1" | data = cpt1; expr = w; unit = m
  pg6: PlotGroup1D "一维绘图组 6" | data = dset1
    ptgr1: PointGraph "点结果图 1" | data = cpt1; expr = T
  pg8: PlotGroup3D "温度 (ht)" | data = dset1
    surf1: Surface "表面" | data = cpl1; expr = T
  pg9: PlotGroup1D "一维绘图组 9" | data = dset1
    ptgr1: PointGraph "点结果图 1" | data = cpt1; expr = sqrt(u^2+v^2+w^2); unit = m
  pg11: PlotGroup3D "应力 (solid) 1" | data = dset1
    vol1: Volume "体 1" (disabled) | expr = solid.mises
      def: Deform "变形" | expr = {u, v, w}; descr = 位移场
    surf1: Surface "表面 1" | data = cpl1; expr = solid.mises